11.02.2025
14:01
$PROBLEM    2 compartment fitting
$INPUT       ID TIME AMT RATE DV MDV EVID WT AGE SEX BUN SCR OCC CRCL COV1 COV2

$DATA      C:\temp\pd_selzer_10024/dataWithPeriod.csv IGNORE=@

$SUBROUTINE ADVAN4 ;; advan4
$PK
  CWTKGONE = WT/81  ;; WEIGHT CENTERED ON ONE
  CWTKGZERO = WT-81 ;; WEIGHT CENTERED ON ZERO
  CAGE = AGE/60     ;; AGE CENTERED ON ONE
  CCRCL = CRCL/85.6 ;; CRCL CENTERD ON ONE
  CCOV1 = COV1-15.4 ;; COVARIATE 1 CENTERED ON ZERO
  IF(OCC.EQ.1) IOVV = ETA(5)
  IF(OCC.EQ.2) IOVV = ETA(6)
  IF(OCC.EQ.3) IOVV = ETA(7)
  TVV2=THETA(1) *CWTKGONE**THETA(6) *EXP(SEX*THETA(7))    *EXP(IOVV)
  V2=TVV2*EXP(ETA(2))
  IOVCL = 0
  TVCL= THETA(3) *CWTKGONE**THETA(8) *CAGE**THETA(9) *CCRCL**THETA(10) *EXP(CCOV1*THETA(11)) *EXP(IOVCL)
  CL=TVCL*EXP(ETA(1))

  K=CL/V2
  K23=THETA(4)
  K32=THETA(5)
  D1=THETA(12) *EXP(ETA(3)) ; infusion only
  TVKA=THETA(2)
  KA=TVKA
  S2 = V2
$ERROR
  REP = IREP
  IPRED =F
  IOBS = F *EXP(EPS(1))+EPS(2)
  Y=IOBS
$THETA
  (0.001,100) 	; THETA(1) V  UNITS = L
  (0.001, 10) 	; THETA(2) KA UNITS = 1/HR
  (0.001,2)	; THETA(3) CL UNITS =  L/HR
  (0.001,0.02)  	 ; THETA(4) K23
  (0.001,0.3) 	 ; THETA(5) K32
  ; init for K23~WT
  (-4,0.8) 	; THETA(6) POWER volume ~WT
  (-4,0.1) 	; THETA(7) EXPONENTIAL volume~SEX

  (-4,.7) 	; THETA(8) POWER clearance~WT
  (-4,.7) 	; THETA(9) POWER clearance~AGE
  (-4,-0.2) 	; THETA(10) POWER clearance~CRCL
  (-4,0.1) 	; THETA(11) EXPONENTIAL CL~COV1
  (0.01,0.2) 		;; THETA(12) D1
$OMEGA
  0.1  		; ETA(1) CLEARANCE
  0.4  		; ETA(2) VOLUME

$OMEGA BLOCK(2) ;; block OMEGA block
  0.1 		;; ETA(3) ETA ON ALAG1
  0.01 0.1 		;; ETA(4) ETA ON D1
  ;; no iov ON CL
$OMEGA BLOCK(1) ; ETA(5)
  0.1
$OMEGA BLOCK SAME ; ETA(6)
$OMEGA BLOCK SAME ; ETA(7)
$SIGMA
  0.1 	; EPS(1) proportional error
  100 	; EPS(2) additive error

$EST METHOD=COND INTER MAX = 9999 MSFO=MSF1 PRINT = 10
$COV UNCOND PRINT=E  PRECOND=1 PRECONDS=TOS  MATRIX = R

;; Phenotype: ({'ADVAN': 1, 'K23~WT': 0, 'KAETA': 0, 'V2~WT': 1, 'V2~AGE': 0, 'V2~SEX': 1, 'V2~COV2': 0, 'CL~WT': 1, 'CL~AGE': 1, 'CL~CRCL': 1, 'CL~COV1': 1, 'IOVCL': 1, 'IOVV': 0, 'INITCL': 0, 'ETAD1LAG': 4, 'D1LAG': 1, 'RESERR': 0})
;; Genotype: [1, 0, 0, 1, 0, 1, 0, 1, 1, 1, 1, 1, 0, 0, 4, 1, 0]
;; Num non-influential tokens: 0

NM-TRAN MESSAGES
 WARNINGS AND ERRORS (IF ANY) FOR PROBLEM    1
 (WARNING  2) NM-TRAN INFERS THAT THE DATA ARE POPULATION.
 (WARNING  3) THERE MAY BE AN ERROR IN THE ABBREVIATED CODE. THE FOLLOWING
 ONE OR MORE RANDOM VARIABLES ARE DEFINED WITH "IF" STATEMENTS THAT DO NOT
 PROVIDE DEFINITIONS FOR BOTH THE "THEN" AND "ELSE" CASES. IF ALL
 CONDITIONS FAIL, THE VALUES OF THESE VARIABLES WILL BE ZERO.
   IOVV
 (WARNING  31) $OMEGA INCLUDES A NON-FIXED INITIAL ESTIMATE CORRESPONDING TO
 AN ETA THAT IS NOT USED IN ABBREVIATED CODE.
 (WARNING  41) NON-FIXED PARAMETER ESTIMATES CORRESPONDING TO UNUSED
 PARAMETERS MAY CAUSE THE COVARIANCE STEP TO FAIL.

1NONLINEAR MIXED EFFECTS MODEL PROGRAM (NONMEM) VERSION 7.4.3
 ORIGINALLY DEVELOPED BY STUART BEAL, LEWIS SHEINER, AND ALISON BOECKMANN
 CURRENT DEVELOPERS ARE ROBERT BAUER, ICON DEVELOPMENT SOLUTIONS,
 AND ALISON BOECKMANN. IMPLEMENTATION, EFFICIENCY, AND STANDARDIZATION
 PERFORMED BY NOUS INFOSYSTEMS.
 PROBLEM NO.:         1
 2 compartment fitting
 TOT. NO. OF OBS RECS:      951
 TOT. NO. OF INDIVIDUALS:       66
 TWO COMPARTMENT MODEL WITH FIRST-ORDER ABSORPTION (ADVAN4)
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 #TBLN:      1
 #METH: First Order Conditional Estimation with Interaction
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
 #TERM:
0MINIMIZATION SUCCESSFUL
 NO. OF FUNCTION EVALUATIONS USED:     1013
 NO. OF SIG. DIGITS IN FINAL EST.:  3.7
0PARAMETER ESTIMATE IS NEAR ITS BOUNDARY

 ETABAR IS THE ARITHMETIC MEAN OF THE ETA-ESTIMATES,
 AND THE P-VALUE IS GIVEN FOR THE NULL HYPOTHESIS THAT THE TRUE MEAN IS 0.

 ETABAR:         1.1135E-02 -7.1405E-03  0.0000E+00  0.0000E+00  9.0821E-06  5.2658E-06 -1.4628E-05
 SE:             5.1860E-02  6.0696E-02  0.0000E+00  0.0000E+00  9.2767E-06  4.0011E-06  1.1562E-05
 N:                      66          66          66          66          66          66          66

 P VAL.:         8.3000E-01  9.0635E-01  1.0000E+00  1.0000E+00  3.2756E-01  1.8814E-01  2.0582E-01

 ETASHRINKSD(%)  5.0757E+00  1.6156E+00  1.0000E+02  1.0000E+02  9.7599E+01  9.8964E+01  9.7007E+01
 ETASHRINKVR(%)  9.8938E+00  3.2050E+00  1.0000E+02  1.0000E+02  9.9942E+01  9.9989E+01  9.9910E+01
 EBVSHRINKSD(%)  4.5298E+00  2.0302E+00  1.0000E+02  1.0000E+02  9.8710E+01  9.9265E+01  9.8763E+01
 EBVSHRINKVR(%)  8.8545E+00  4.0192E+00  1.0000E+02  1.0000E+02  9.9983E+01  9.9995E+01  9.9985E+01
 EPSSHRINKSD(%)  5.7435E+00  5.7435E+00
 EPSSHRINKVR(%)  1.1157E+01  1.1157E+01


 TOTAL DATA POINTS NORMALLY DISTRIBUTED (N):          951
 N*LOG(2PI) CONSTANT TO OBJECTIVE FUNCTION:    1747.8210901552875
 OBJECTIVE FUNCTION VALUE WITHOUT CONSTANT:    8986.3175165397952
 OBJECTIVE FUNCTION VALUE WITH CONSTANT:       10734.138606695084
 REPORTED OBJECTIVE FUNCTION DOES NOT CONTAIN CONSTANT

 TOTAL EFFECTIVE ETAS (NIND*NETA):                           282


 #TERE:
 Elapsed estimation  time in seconds:    30.91
 TESTING R MATRIX FOR POSITIVE DEFINITNESS
 R MATRIX IS NOT POSITIVE DEFINITE
 PRECONDITIONING CYCLE NO.            1
 Elapsed covariance  time in seconds:    73.91
 Elapsed postprocess time in seconds:     0.00

 ********************               FIRST ORDER CONDITIONAL ESTIMATION WITH INTERACTION              ********************
 #OBJT:**************                       MINIMUM VALUE OF OBJECTIVE FUNCTION                      ********************
 #OBJV:********************************************     8986.318       **************************************************

 ********************               FIRST ORDER CONDITIONAL ESTIMATION WITH INTERACTION              ********************
 ********************                             FINAL PARAMETER ESTIMATE                           ********************

 THETA - VECTOR OF FIXED EFFECTS PARAMETERS   *********
         TH 1      TH 2      TH 3      TH 4      TH 5      TH 6      TH 7      TH 8      TH 9      TH10      TH11      TH12
         3.41E+01  3.87E+05  8.05E+00  1.78E+00  4.98E-01  3.62E-01 -1.71E-01 -3.14E-02 -1.63E-01 -2.30E-01  5.39E-03  2.00E-01

 OMEGA - COV MATRIX FOR RANDOM EFFECTS - ETAS  ********
         ETA1      ETA2      ETA3      ETA4      ETA5      ETA6      ETA7
 ETA1
+        2.00E-01
 ETA2
+        0.00E+00  2.55E-01
 ETA3
+        0.00E+00  0.00E+00  1.00E-01
 ETA4
+        0.00E+00  0.00E+00  1.00E-02  1.00E-01
 ETA5
+        0.00E+00  0.00E+00  0.00E+00  0.00E+00  1.00E-05
 ETA6
+        0.00E+00  0.00E+00  0.00E+00  0.00E+00  0.00E+00  1.00E-05
 ETA7
+        0.00E+00  0.00E+00  0.00E+00  0.00E+00  0.00E+00  0.00E+00  1.00E-05

 SIGMA - COV MATRIX FOR RANDOM EFFECTS - EPSILONS  ****
         EPS1      EPS2
 EPS1
+        7.69E-02
 EPS2
+        0.00E+00  1.23E-01

 OMEGA - CORR MATRIX FOR RANDOM EFFECTS - ETAS  *******
         ETA1      ETA2      ETA3      ETA4      ETA5      ETA6      ETA7
 ETA1
+        4.47E-01
 ETA2
+        0.00E+00  5.05E-01
 ETA3
+        0.00E+00  0.00E+00  3.16E-01
 ETA4
+        0.00E+00  0.00E+00  1.00E-01  3.16E-01
 ETA5
+        0.00E+00  0.00E+00  0.00E+00  0.00E+00  3.16E-03
 ETA6
+        0.00E+00  0.00E+00  0.00E+00  0.00E+00  0.00E+00  3.16E-03
 ETA7
+        0.00E+00  0.00E+00  0.00E+00  0.00E+00  0.00E+00  0.00E+00  3.16E-03

 SIGMA - CORR MATRIX FOR RANDOM EFFECTS - EPSILONS  ***
         EPS1      EPS2
 EPS1
+        2.77E-01
 EPS2
+        0.00E+00  3.51E-01

 ********************               FIRST ORDER CONDITIONAL ESTIMATION WITH INTERACTION              ********************
 ********************                            STANDARD ERROR OF ESTIMATE                          ********************

 THETA - VECTOR OF FIXED EFFECTS PARAMETERS   *********
         TH 1      TH 2      TH 3      TH 4      TH 5      TH 6      TH 7      TH 8      TH 9      TH10      TH11      TH12
         3.37E+00  5.41E+07  5.20E-01  1.49E-01  2.78E-02  4.81E-01  1.35E-01  2.69E-01  2.78E-01  1.88E-01  1.98E-02  1.90E+74

 OMEGA - COV MATRIX FOR RANDOM EFFECTS - ETAS  ********
         ETA1      ETA2      ETA3      ETA4      ETA5      ETA6      ETA7
 ETA1
+        3.89E-02
 ETA2
+       .........  4.63E-02
 ETA3
+       ......... .........  2.00E+73
 ETA4
+       ......... .........  1.00E+73  1.99E+73
 ETA5
+       ......... ......... ......... .........  6.85E+68
 ETA6
+       ......... ......... ......... ......... ......... .........
 ETA7
+       ......... ......... ......... ......... ......... ......... .........

 SIGMA - COV MATRIX FOR RANDOM EFFECTS - EPSILONS  ****
         EPS1      EPS2
 EPS1
+        4.34E-03
 EPS2
+       .........  1.99E-01

 OMEGA - CORR MATRIX FOR RANDOM EFFECTS - ETAS  *******
         ETA1      ETA2      ETA3      ETA4      ETA5      ETA6      ETA7
 ETA1
+        4.35E-02
 ETA2
+       .........  4.58E-02
 ETA3
+       ......... .........  4.0E+146
 ETA4
+       ......... .........  1.0E+146  3.9E+146
 ETA5
+       ......... ......... ......... .........  4.7E+137
 ETA6
+       ......... ......... ......... ......... ......... .........
 ETA7
+       ......... ......... ......... ......... ......... ......... .........

 SIGMA - CORR MATRIX FOR RANDOM EFFECTS - EPSILONS  ***
         EPS1      EPS2
 EPS1
+        7.83E-03
 EPS2
+       .........  2.83E-01
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
 ********************               FIRST ORDER CONDITIONAL ESTIMATION WITH INTERACTION              ********************
 ********************                      EIGENVALUES OF COR MATRIX OF ESTIMATE                     ********************

             1         2         3         4         5         6         7         8         9        10        11        12
             13        14        15        16        17        18        19        20
         1.36E-01  1.62E-01  3.44E-01  5.41E-01  6.82E-01  7.60E-01  7.75E-01  8.38E-01  8.59E-01  9.88E-01  1.00E+00  1.00E+00
          1.00E+00  1.03E+00  1.05E+00  1.14E+00  1.23E+00  1.28E+00  2.03E+00  3.17E+00
 Elapsed finaloutput time in seconds:     0.13
 #CPUT: Total CPU Time in Seconds,      105.094
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