02/06/2025
14:13
;; 1. Based on: run2313
;; 2. Description: Cleanup
;; x1. Author: Sim
;; 3. Label:

$PROBLEM PK

$INPUT ID TIME TAD AMT PERIOD EVID CMT DV ANALYTE LLOQ BLQ AGE WT HT BMI CYP2D6 CYP2D6N VPC

$DATA Clomifen_PK_07.dat IGNORE=@ IGNORE=(PERIOD.GE.2)
$SUBROUTINES ADVAN6 TOL=5

$MODEL
COMP(ABS)      ;1 Absorption compartment
COMP(CENT)     ;2 Central compartment
COMP(LIVER)    ;3 LIVER compartment
COMP(Peri)     ;4 Peri compartment
COMP(Peri2)    ;5 Peri compartment
COMP(4OHC)     ;6 4-OH Clom
COMP(4OHCP1)   ;7 4-OH Clom P1
COMP(DE)       ;8 DE-Clom
COMP(DEP1)     ;9 DE-Clom
COMP(4OHDE)    ;10 4_OH_DE_Clom
COMP(4OHDEP1)  ;11 4_OH_DE_Clom P1
COMP(DDE)      ;12 DDE
COMP(DDEP1)    ;13 DDE P1
COMP(NO)       ;14 CLom-NO

$PK

;-------------Clomifene-----------------
VC                              = THETA(1)
V2                              = VC

CYP2D6FACT                      = 1
IF (CYP2D6N.EQ.1) CYP2D6FACT    = 0.39
IF (CYP2D6N.EQ.0.5) CYP2D6FACT  = 0.17
IF (CYP2D6N.EQ.0.75) CYP2D6FACT = 0.27
IF (CYP2D6N.EQ.3) CYP2D6FACT    = 1.89

K30                             = THETA(9) * EXP(ETA(1)) ; PM
IF (CYP2D6N.GT.0) K30           = (THETA(9) + THETA(10) * CYP2D6FACT) * EXP(ETA(1)) ; non-PM

K32                             = THETA(3)
K23                             = THETA(4)
Q4                              = THETA(5)
VP1                             = THETA(6)
V4                              = VP1
Q5                              = THETA(7)
VP2                             = THETA(8)
V5                              = VP2

;;;;;;;;;;;;;;;;;;;;;;;;;;;;;;;;;;;;;;;;;;;;;;;;;;;;;;;;;;;;;;;;;;;;;;;;;;;;;;;;;;
;; Transit Parameters
MTT                             = THETA(2) * EXP(ETA(2))
NCPT                            = THETA(11) * EXP(ETA(3))
F1                              = 0
KTR                             = (NCPT + 1) / MTT
;; Approximation of NCPT!
SAPPX                           = SQRT(2 * 3.1416) * NCPT ** (NCPT + 0.5) * EXP(-NCPT)
;; LNSAPPX                      = LOG(2.5066) + (NCPT + 0.5) * LOG(NCPT) - NCPT
IF (AMT.GT.0) DOSE_0            = AMT
IF (AMT.GT.0) TDOSE             = TIME
;;;;;;;;;;;;;;;;;;;;;;;;;;;;;;;;;;;;;;;;;;;;;;;;;;;;;;;;;;;;;;;;;;;;;;;;;;;;;;;;;;

;-------------4-OH -----------------
V6                              = VC
K36                             = THETA(13)
IF (CYP2D6N.GT.0) K36           = (THETA(13) + THETA(29) * CYP2D6FACT)

K60                             = THETA(14)
IF (CYP2D6N.GT.0) K60           = (THETA(14) + THETA(28) * CYP2D6FACT)

Q7                              = THETA(12)
V7                              = VP1

;-------------DE-Clom-----------------
V8                              = VC
K38                             = THETA(15)

K812                            = THETA(16)
IF (CYP2D6N.GT.0) K812          = (THETA(16) + THETA(27) * CYP2D6FACT)

Q9                              = THETA(17)
V9                              = VP1

;-------------4_OH_DE_Clom-----------------
V10                             = VC

K810                            = THETA(18)
IF (CYP2D6N.GT.0) K810          = (THETA(18) + THETA(26) * CYP2D6FACT)

K610                            = THETA(19)
K100                            = THETA(20)
Q11                             = THETA(21)
V11                             = VP1

;-------------4_OH_DE_Clom-----------------
V12                             = VC
K120                            = THETA(22)
Q13                             = THETA(23)
V13                             = VP1

;-------------E_Clom-NO-----------------
V14                             = VC
K314                            = THETA(24)
K140                            = THETA(25)

;-------------Calculations and Scaling-----------------
K24                             = Q4/V2
K42                             = Q4/V4
K25                             = Q5/V2
K52                             = Q5/V5
K67                             = Q7/V6
K76                             = Q7/V7
K89                             = Q9/V8
K98                             = Q9/V9
K1011                           = Q11/V10
K1110                           = Q11/V11
K1213                           = Q13/V12
K1312                           = Q13/V13

S2                              = V2
S6                              = V6
S8                              = V8
S10                             = V10
S12                             = V12
S14                             = V14

$DES
TCUR    =  T - TDOSE

DADT(1) =     0
DADT(2) =     K32*A(3) - K23*A(2) + K42*A(4) - K24*A(2) + K52*A(5) - K25*A(2)
DADT(3) =     - K30*A(3) - K32*A(3) + K23*A(2) -  K36*A(3) -K38*A(3) -K314*A(3) + DOSE_0 * (KTR ** (NCPT + 1)) * (TCUR ** NCPT) * EXP(-KTR * TCUR) / SAPPX
DADT(4) =   - K42*A(4) + K24*A(2)
DADT(5) =   - K52*A(5) + K25*A(2)
DADT(6) =     K36*A(3) - K60*A(6) + K76*A(7) - K67*A(6) - K610*A(6)
DADT(7) =   - K76*A(7) + K67*A(6)
DADT(8) =     K38*A(3) - K812*A(8) - K89*A(8) + K98*A(9) - K810*A(8)
DADT(9) =     K89*A(8) - K98*A(9)
DADT(10) =    K810*A(8) + K610*A(6) - K100*A(10) - K1011*A(10) + K1110*A(11)
DADT(11) =    K1011*A(10) - K1110*A(11)
DADT(12) =    K812*A(8) - K120*A(12) - K1213*A(12) + K1312*A(13)
DADT(13) =    K1213*A(12) - K1312*A(13)
DADT(14) =    K314*A(3) - K140*A(14)

$ERROR
IPRED=F
DEL=0
IF (IPRED.EQ.0) DEL=0.0001
W=F

IRES=DV-IPRED
IWRES=IRES/(W+DEL)

Y=IPRED+W*EPS(1)+EPS(2)
IF (CMT.EQ.6) Y=IPRED+W*EPS(3)+EPS(4)
IF (CMT.EQ.8) Y=IPRED+W*EPS(5)+EPS(6)
IF (CMT.EQ.10) Y=IPRED+W*EPS(7)+EPS(8)
IF (CMT.EQ.12) Y=IPRED+W*EPS(9)+EPS(10)
IF (CMT.EQ.14) Y=IPRED+W*EPS(11)+EPS(12)

;------------------------------INITIAL ESTIMATES--------------------------------

$THETA
(0, 11.1) ;VC
(0.1, 2.44) ;MTT
(0, 0.546) ;K32
(0, 4.14) ;K23
(0, 89.5) ;Q4
(0, 464) ;VP1
(0, 36.7) ;Q5
(0, 3260) ;VP2
(0, 2.2E-10) ;K30_BL
(0, 1.95) ;K30_CYP2D6
(0.1, 2.48) ;NCPT
(0, 125) ;Q7
(0, 0.00665) ;K36_BL
(0, 0.427) ;K60_BL
(0, 0.134) ;K38
(0, 0.0217) ;K812_BL
(0, 181) ;Q9
(0, 0.00694) ;K810_BL
(0, 0.156) ;K610
(0, 0.867) ;K100
(0) FIX ;Q11
(0, 7.2E-09) ;K120
(0, 3.68) ;Q13
(0, 0.17) ;K314
(0, 98.9) ;K140
(0, 1.5) ;K810_CYP2D6
(0, 0.26) ;K812_CYP2D6
(0, 2.51) ;K60_CYP2D6
(0, 0.487) ;K36_CYP2D6

$OMEGA 0 FIX  ;IIV K30
$OMEGA 0 FIX  ;IIV MTT
$OMEGA 0 FIX  ;IIV NCPT

$SIGMA 0.32 ;prop.error_EClom
$SIGMA 0.0568 ;add.error_EClom
$SIGMA 0.257 ;prop.error_4-OH-Clom
$SIGMA 0.0112 ;add.error_4-OH-Clom
$SIGMA 0.516 ;prop.error_DE-Clom
$SIGMA 0.0141 ;add.error_DE-Clom
$SIGMA 0.336 ;prop.error_4OH DE-Clom
$SIGMA 0.00166 ;add.error_4OH DE-Clom
$SIGMA 0.377 ;prop.error_DDE-Clom
$SIGMA 0.0108 ;add.error_DDE DE-Clom
$SIGMA 0.595 ;prop.error_E-Clom-NO
$SIGMA 0.000693 ;add.error_E DE-Clom-NO

$EST METHOD=1 INTER MAXEVAL=9999 NOABORT SIG=3 PRINT=1 POSTHOC
$COV
$TABLE ID TIME TAD ETAS(1:LAST) IPRED PERIOD EVID BLQ LLOQ ANALYTE AGE WT HT BMI CYP2D6 CYP2D6N CWRES ONEHEADER NOPRINT FILE=sdtab2400

NM-TRAN MESSAGES
 WARNINGS AND ERRORS (IF ANY) FOR PROBLEM    1
 (WARNING  2) NM-TRAN INFERS THAT THE DATA ARE POPULATION.
 (WARNING  97) A RANDOM QUANTITY IS RAISED TO A POWER. IF THE RESULT AFFECTS
 THE VALUE OF THE OBJECTIVE FUNCTION, THE USER SHOULD ENSURE THAT THE
 RANDOM QUANTITY IS NEVER 0 WHEN THE POWER IS < 1.
 (WARNING  99) A RANDOM QUANTITY IS USED AS A POWER. IF THE RESULT AFFECTS
 THE VALUE OF THE OBJECTIVE FUNCTION, THE USER SHOULD ENSURE THAT THE
 QUANTITY RAISED TO THE POWER IS NOT 0.

1NONLINEAR MIXED EFFECTS MODEL PROGRAM (NONMEM) VERSION 7.4.3
 ORIGINALLY DEVELOPED BY STUART BEAL, LEWIS SHEINER, AND ALISON BOECKMANN
 CURRENT DEVELOPERS ARE ROBERT BAUER, ICON DEVELOPMENT SOLUTIONS,
 AND ALISON BOECKMANN. IMPLEMENTATION, EFFICIENCY, AND STANDARDIZATION
 PERFORMED BY NOUS INFOSYSTEMS.
 PROBLEM NO.:         1
 PK
 TOT. NO. OF OBS RECS:     1308
 TOT. NO. OF INDIVIDUALS:       20
 GENERAL NONLINEAR KINETICS MODEL (DVERK1, ADVAN6)
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 #TBLN:      1
 #METH: First Order Conditional Estimation with Interaction
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
 #TERM:
0MINIMIZATION SUCCESSFUL
 NO. OF FUNCTION EVALUATIONS USED:     6551
 NO. OF SIG. DIGITS IN FINAL EST.:  3.5

 ETABAR IS THE ARITHMETIC MEAN OF THE ETA-ESTIMATES,
 AND THE P-VALUE IS GIVEN FOR THE NULL HYPOTHESIS THAT THE TRUE MEAN IS 0.

 ETABAR:         0.0000E+00  0.0000E+00  0.0000E+00
 SE:             0.0000E+00  0.0000E+00  0.0000E+00
 N:                      20          20          20

 P VAL.:         1.0000E+00  1.0000E+00  1.0000E+00

 ETASHRINKSD(%)  1.0000E+02  1.0000E+02  1.0000E+02
 ETASHRINKVR(%)  1.0000E+02  1.0000E+02  1.0000E+02
 EBVSHRINKSD(%)  0.0000E+00  0.0000E+00  0.0000E+00
 EBVSHRINKVR(%)  0.0000E+00  0.0000E+00  0.0000E+00
 EPSSHRINKSD(%)  1.0000E-10  1.0000E-10  1.0000E-10  1.0000E-10  1.0083E+00  4.7018E-01  1.0196E+00  1.0000E-10  1.0000E-10  1.0000E-10
                 1.0000E-10  1.0000E-10
 EPSSHRINKVR(%)  1.0000E-10  1.0000E-10  1.0000E-10  1.0000E-10  2.0065E+00  9.3814E-01  2.0287E+00  1.0000E-10  1.0000E-10  1.0000E-10
                 1.0000E-10  1.0000E-10


 TOTAL DATA POINTS NORMALLY DISTRIBUTED (N):         1320
 N*LOG(2PI) CONSTANT TO OBJECTIVE FUNCTION:    2425.9977276603358
 OBJECTIVE FUNCTION VALUE WITHOUT CONSTANT:    2391.9169410250151
 OBJECTIVE FUNCTION VALUE WITH CONSTANT:       4817.9146686853510
 REPORTED OBJECTIVE FUNCTION DOES NOT CONTAIN CONSTANT

 TOTAL EFFECTIVE ETAS (NIND*NETA):                             0


 #TERE:
 Elapsed estimation  time in seconds:  1535.70
0S MATRIX ALGORITHMICALLY SINGULAR
0S MATRIX IS OUTPUT
0INVERSE COVARIANCE MATRIX SET TO RS*RMAT, WHERE S* IS A PSEUDO INVERSE OF S
 Elapsed covariance  time in seconds:   794.85
 Elapsed postprocess time in seconds:     3.79

 ********************               FIRST ORDER CONDITIONAL ESTIMATION WITH INTERACTION              ********************
 #OBJT:**************                       MINIMUM VALUE OF OBJECTIVE FUNCTION                      ********************
 #OBJV:********************************************     2391.917       **************************************************

 ********************               FIRST ORDER CONDITIONAL ESTIMATION WITH INTERACTION              ********************
 ********************                             FINAL PARAMETER ESTIMATE                           ********************

 THETA - VECTOR OF FIXED EFFECTS PARAMETERS   *********
         TH 1      TH 2      TH 3      TH 4      TH 5      TH 6      TH 7      TH 8      TH 9      TH10      TH11      TH12
          TH13      TH14      TH15      TH16      TH17      TH18      TH19      TH20      TH21      TH22      TH23      TH24
         TH25      TH26      TH27      TH28      TH29
         1.11E+01  2.44E+00  5.46E-01  4.14E+00  8.95E+01  4.64E+02  3.67E+01  3.26E+03  2.20E-10  1.95E+00  2.48E+00  1.25E+02
          6.65E-03  4.27E-01  1.34E-01  2.17E-02  1.81E+02  6.94E-03  1.56E-01  8.67E-01  0.00E+00  6.93E-09  3.68E+00  1.70E-01
         9.89E+01  1.50E+00  2.60E-01  2.51E+00  4.87E-01

 OMEGA - COV MATRIX FOR RANDOM EFFECTS - ETAS  ********
         ETA1      ETA2      ETA3
 ETA1
+        0.00E+00
 ETA2
+        0.00E+00  0.00E+00
 ETA3
+        0.00E+00  0.00E+00  0.00E+00

 SIGMA - COV MATRIX FOR RANDOM EFFECTS - EPSILONS  ****
         EPS1      EPS2      EPS3      EPS4      EPS5      EPS6      EPS7      EPS8      EPS9      EP10      EP11      EP12
 EPS1
+        3.20E-01
 EPS2
+        0.00E+00  5.68E-02
 EPS3
+        0.00E+00  0.00E+00  2.57E-01
 EPS4
+        0.00E+00  0.00E+00  0.00E+00  1.12E-02
 EPS5
+        0.00E+00  0.00E+00  0.00E+00  0.00E+00  5.16E-01
 EPS6
+        0.00E+00  0.00E+00  0.00E+00  0.00E+00  0.00E+00  1.41E-02
 EPS7
+        0.00E+00  0.00E+00  0.00E+00  0.00E+00  0.00E+00  0.00E+00  3.36E-01
 EPS8
+        0.00E+00  0.00E+00  0.00E+00  0.00E+00  0.00E+00  0.00E+00  0.00E+00  1.66E-03
 EPS9
+        0.00E+00  0.00E+00  0.00E+00  0.00E+00  0.00E+00  0.00E+00  0.00E+00  0.00E+00  3.77E-01
         EPS1      EPS2      EPS3      EPS4      EPS5      EPS6      EPS7      EPS8      EPS9      EP10      EP11      EP12
 EP10
+        0.00E+00  0.00E+00  0.00E+00  0.00E+00  0.00E+00  0.00E+00  0.00E+00  0.00E+00  0.00E+00  1.08E-02
 EP11
+        0.00E+00  0.00E+00  0.00E+00  0.00E+00  0.00E+00  0.00E+00  0.00E+00  0.00E+00  0.00E+00  0.00E+00  5.95E-01
 EP12
+        0.00E+00  0.00E+00  0.00E+00  0.00E+00  0.00E+00  0.00E+00  0.00E+00  0.00E+00  0.00E+00  0.00E+00  0.00E+00  6.93E-04

 OMEGA - CORR MATRIX FOR RANDOM EFFECTS - ETAS  *******
         ETA1      ETA2      ETA3
 ETA1
+        0.00E+00
 ETA2
+        0.00E+00  0.00E+00
 ETA3
+        0.00E+00  0.00E+00  0.00E+00

 SIGMA - CORR MATRIX FOR RANDOM EFFECTS - EPSILONS  ***
         EPS1      EPS2      EPS3      EPS4      EPS5      EPS6      EPS7      EPS8      EPS9      EP10      EP11      EP12
 EPS1
+        5.65E-01
 EPS2
+        0.00E+00  2.38E-01
 EPS3
+        0.00E+00  0.00E+00  5.07E-01
 EPS4
+        0.00E+00  0.00E+00  0.00E+00  1.06E-01
 EPS5
+        0.00E+00  0.00E+00  0.00E+00  0.00E+00  7.19E-01
 EPS6
+        0.00E+00  0.00E+00  0.00E+00  0.00E+00  0.00E+00  1.19E-01
 EPS7
+        0.00E+00  0.00E+00  0.00E+00  0.00E+00  0.00E+00  0.00E+00  5.79E-01
 EPS8
+        0.00E+00  0.00E+00  0.00E+00  0.00E+00  0.00E+00  0.00E+00  0.00E+00  4.07E-02
 EPS9
+        0.00E+00  0.00E+00  0.00E+00  0.00E+00  0.00E+00  0.00E+00  0.00E+00  0.00E+00  6.14E-01
 EP10
+        0.00E+00  0.00E+00  0.00E+00  0.00E+00  0.00E+00  0.00E+00  0.00E+00  0.00E+00  0.00E+00  1.04E-01
 EP11
+        0.00E+00  0.00E+00  0.00E+00  0.00E+00  0.00E+00  0.00E+00  0.00E+00  0.00E+00  0.00E+00  0.00E+00  7.72E-01
 EP12
+        0.00E+00  0.00E+00  0.00E+00  0.00E+00  0.00E+00  0.00E+00  0.00E+00  0.00E+00  0.00E+00  0.00E+00  0.00E+00  2.63E-02

 ********************               FIRST ORDER CONDITIONAL ESTIMATION WITH INTERACTION              ********************
 ********************                            STANDARD ERROR OF ESTIMATE                          ********************

 THETA - VECTOR OF FIXED EFFECTS PARAMETERS   *********
         TH 1      TH 2      TH 3      TH 4      TH 5      TH 6      TH 7      TH 8      TH 9      TH10      TH11      TH12
          TH13      TH14      TH15      TH16      TH17      TH18      TH19      TH20      TH21      TH22      TH23      TH24
         TH25      TH26      TH27      TH28      TH29
         3.69E+00  7.40E-02  1.70E-01  1.55E+00  2.20E+01  7.77E+01  1.23E+01  6.93E+02  3.85E-10  4.92E-01  3.00E-01  4.94E+01
          2.05E-03  4.66E-01  3.44E-02  6.41E-03  6.95E+01  4.70E-03  1.13E-01  2.44E-01 .........  9.53E-09  8.76E-01  7.46E-02
         6.03E+01  6.66E-01  5.78E-02  9.85E-01  1.64E-01

 OMEGA - COV MATRIX FOR RANDOM EFFECTS - ETAS  ********
         ETA1      ETA2      ETA3
 ETA1
+       .........
 ETA2
+       ......... .........
 ETA3
+       ......... ......... .........

 SIGMA - COV MATRIX FOR RANDOM EFFECTS - EPSILONS  ****
         EPS1      EPS2      EPS3      EPS4      EPS5      EPS6      EPS7      EPS8      EPS9      EP10      EP11      EP12
 EPS1
+        7.77E-02
 EPS2
+       .........  2.70E-02
 EPS3
+       ......... .........  5.12E-02
 EPS4
+       ......... ......... .........  9.21E-03
 EPS5
+       ......... ......... ......... .........  1.10E-01
 EPS6
+       ......... ......... ......... ......... .........  3.61E-03
 EPS7
+       ......... ......... ......... ......... ......... .........  6.55E-02
 EPS8
+       ......... ......... ......... ......... ......... ......... .........  4.93E-04
 EPS9
+       ......... ......... ......... ......... ......... ......... ......... .........  5.87E-02
         EPS1      EPS2      EPS3      EPS4      EPS5      EPS6      EPS7      EPS8      EPS9      EP10      EP11      EP12
 EP10
+       ......... ......... ......... ......... ......... ......... ......... ......... .........  3.69E-03
 EP11
+       ......... ......... ......... ......... ......... ......... ......... ......... ......... .........  1.93E-01
 EP12
+       ......... ......... ......... ......... ......... ......... ......... ......... ......... ......... .........  3.97E-04

 OMEGA - CORR MATRIX FOR RANDOM EFFECTS - ETAS  *******
         ETA1      ETA2      ETA3
 ETA1
+       .........
 ETA2
+       ......... .........
 ETA3
+       ......... ......... .........

 SIGMA - CORR MATRIX FOR RANDOM EFFECTS - EPSILONS  ***
         EPS1      EPS2      EPS3      EPS4      EPS5      EPS6      EPS7      EPS8      EPS9      EP10      EP11      EP12
 EPS1
+        6.87E-02
 EPS2
+       .........  5.66E-02
 EPS3
+       ......... .........  5.05E-02
 EPS4
+       ......... ......... .........  4.36E-02
 EPS5
+       ......... ......... ......... .........  7.68E-02
 EPS6
+       ......... ......... ......... ......... .........  1.52E-02
 EPS7
+       ......... ......... ......... ......... ......... .........  5.65E-02
 EPS8
+       ......... ......... ......... ......... ......... ......... .........  6.06E-03
 EPS9
+       ......... ......... ......... ......... ......... ......... ......... .........  4.78E-02
 EP10
+       ......... ......... ......... ......... ......... ......... ......... ......... .........  1.78E-02
 EP11
+       ......... ......... ......... ......... ......... ......... ......... ......... ......... .........  1.25E-01
 EP12
+       ......... ......... ......... ......... ......... ......... ......... ......... ......... ......... .........  7.54E-03
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 Elapsed finaloutput time in seconds:     0.61
 #CPUT: Total CPU Time in Seconds,     8417.438
