14.02.2025
13:11
$PROBLEM    2 compartment fitting
$INPUT       ID TIME AMT DROP DV MDV EVID WT AGE SEX BUN SCR OCC CRCL COV1 COV2

$DATA      C:\temp\pd_selzer_27367/dataWithPeriod.csv IGNORE=@

$SUBROUTINE ADVAN4 ;; advan4
$PK
  CWTKGONE = WT/81  ;; WEIGHT CENTERED ON ONE
  CWTKGZERO = WT-81 ;; WEIGHT CENTERED ON ZERO
  CAGE = AGE/60     ;; AGE CENTERED ON ONE
  CCRCL = CRCL/85.6 ;; CRCL CENTERD ON ONE
  CCOV1 = COV1-15.4 ;; COVARIATE 1 CENTERED ON ZERO
  IOVV = 0
  TVV2=THETA(1)   *CAGE**THETA(7)   *EXP(IOVV)
  V2=TVV2*EXP(ETA(2))
  IF(OCC.EQ.1) IOVCL = ETA(4)
  IF(OCC.EQ.2) IOVCL = ETA(5)
  IF(OCC.EQ.3) IOVCL = ETA(6)
  TVCL= THETA(3) *CWTKGONE**THETA(8) *CAGE**THETA(9)  *EXP(CCOV1*THETA(10)) *EXP(IOVCL)
  CL=TVCL*EXP(ETA(1))

  K=CL/V2
  K23=THETA(4)*CWTKGONE**THETA(6)
  K32=THETA(5)*CWTKGONE**THETA(6)
  ALAG1=THETA(11)*EXP(ETA(3))
  ;; No D1
  TVKA=THETA(2)
  KA=TVKA
  S2 = V2
$ERROR
  REP = IREP
  IPRED =F
  IOBS = F +EPS(1)
  Y=IOBS
$THETA
  (0.001,100) 	; THETA(1) V  UNITS = L
  (0.001, 10) 	; THETA(2) KA UNITS = 1/HR
  (0.001,2)	; THETA(3) CL UNITS =  L/HR
  (0.001,0.02)  	 ; THETA(4) K23
  (0.001,0.3) 	 ; THETA(5) K32
  (0,0.1) 	; THETA(6) K23~WT 	 ; init for K23~WT

  (-4,0.8) 	; THETA(7) POWER volume ~AGE

  (-4,.7) 	; THETA(8) POWER clearance~WT
  (-4,.7) 	; THETA(9) POWER clearance~AGE

  (-4,0.1) 	; THETA(10) EXPONENTIAL CL~COV1
  (0.001,0.1) 	; THETA(11) ALAG1
$OMEGA
  0.1  		; ETA(1) CLEARANCE
  0.4  		; ETA(2) VOLUME

$OMEGA ;; 3rd OMEGA block
  0.1 		;; ETA(3) ETA ON ALAG1
$OMEGA BLOCK(1) ; ETA(4)
  0.1
$OMEGA BLOCK SAME ; ETA(5)
$OMEGA BLOCK SAME ; ETA(6)
  ;; no iov ON V
$SIGMA
  200 	; EPS(1) additive error

$EST METHOD=COND INTER MAX = 9999 MSFO=MSF1 PRINT = 10
$COV UNCOND PRINT=E  PRECOND=1 PRECONDS=TOS  MATRIX = R

;; Phenotype: ({'ADVAN': 1, 'K23~WT': 1, 'KAETA': 0, 'V2~WT': 0, 'V2~AGE': 1, 'V2~SEX': 0, 'V2~COV2': 0, 'CL~WT': 1, 'CL~AGE': 1, 'CL~CRCL': 0, 'CL~COV1': 1, 'IOVCL': 0, 'IOVV': 1, 'INITCL': 0, 'ETAD1LAG': 1, 'D1LAG': 0, 'RESERR': 1})
;; Genotype: [1, 1, 0, 0, 1, 0, 0, 1, 1, 0, 1, 0, 1, 0, 1, 0, 1]
;; Num non-influential tokens: 0

NM-TRAN MESSAGES
 WARNINGS AND ERRORS (IF ANY) FOR PROBLEM    1
 (WARNING  2) NM-TRAN INFERS THAT THE DATA ARE POPULATION.
 (WARNING  3) THERE MAY BE AN ERROR IN THE ABBREVIATED CODE. THE FOLLOWING
 ONE OR MORE RANDOM VARIABLES ARE DEFINED WITH "IF" STATEMENTS THAT DO NOT
 PROVIDE DEFINITIONS FOR BOTH THE "THEN" AND "ELSE" CASES. IF ALL
 CONDITIONS FAIL, THE VALUES OF THESE VARIABLES WILL BE ZERO.
   IOVCL

1NONLINEAR MIXED EFFECTS MODEL PROGRAM (NONMEM) VERSION 7.4.3
 ORIGINALLY DEVELOPED BY STUART BEAL, LEWIS SHEINER, AND ALISON BOECKMANN
 CURRENT DEVELOPERS ARE ROBERT BAUER, ICON DEVELOPMENT SOLUTIONS,
 AND ALISON BOECKMANN. IMPLEMENTATION, EFFICIENCY, AND STANDARDIZATION
 PERFORMED BY NOUS INFOSYSTEMS.
 PROBLEM NO.:         1
 2 compartment fitting
 TOT. NO. OF OBS RECS:      951
 TOT. NO. OF INDIVIDUALS:       66
 TWO COMPARTMENT MODEL WITH FIRST-ORDER ABSORPTION (ADVAN4)
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 #TBLN:      1
 #METH: First Order Conditional Estimation with Interaction
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
 #TERM:
0MINIMIZATION TERMINATED
 DUE TO ROUNDING ERRORS (ERROR=134)
 NO. OF FUNCTION EVALUATIONS USED:     1147
 NO. OF SIG. DIGITS UNREPORTABLE

 ETABAR IS THE ARITHMETIC MEAN OF THE ETA-ESTIMATES,
 AND THE P-VALUE IS GIVEN FOR THE NULL HYPOTHESIS THAT THE TRUE MEAN IS 0.

 ETABAR:         1.1501E-02 -1.3979E-02  1.4674E-02  1.4542E-02 -1.0986E-02  4.1104E-03
 SE:             3.3629E-02  5.5976E-02  3.1092E-02  2.1222E-02  1.2997E-02  1.0304E-02
 N:                      66          66          66          66          66          66

 P VAL.:         7.3236E-01  8.0279E-01  6.3695E-01  4.9319E-01  3.9795E-01  6.8995E-01

 ETASHRINKSD(%)  4.5953E+01  1.8122E+01  5.9401E+01  5.8225E+01  7.4415E+01  7.9717E+01
 ETASHRINKVR(%)  7.0790E+01  3.2960E+01  8.3517E+01  8.2549E+01  9.3454E+01  9.5886E+01
 EBVSHRINKSD(%)  3.9840E+01  1.0625E+01  5.0525E+01  5.7114E+01  7.7385E+01  7.7798E+01
 EBVSHRINKVR(%)  6.3807E+01  2.0121E+01  7.5522E+01  8.1608E+01  9.4886E+01  9.5071E+01
 EPSSHRINKSD(%)  5.4862E+00
 EPSSHRINKVR(%)  1.0671E+01


 TOTAL DATA POINTS NORMALLY DISTRIBUTED (N):          951
 N*LOG(2PI) CONSTANT TO OBJECTIVE FUNCTION:    1747.8210901552875
 OBJECTIVE FUNCTION VALUE WITHOUT CONSTANT:    10851.892569680142
 OBJECTIVE FUNCTION VALUE WITH CONSTANT:       12599.713659835430
 REPORTED OBJECTIVE FUNCTION DOES NOT CONTAIN CONSTANT

 TOTAL EFFECTIVE ETAS (NIND*NETA):                           348


 #TERE:
 Elapsed estimation  time in seconds:    41.69
 TESTING R MATRIX FOR POSITIVE DEFINITNESS
 R MATRIX IS NOT POSITIVE DEFINITE
 PRECONDITIONING CYCLE NO.            1
 Elapsed covariance  time in seconds:    49.70
 Elapsed postprocess time in seconds:     0.00

 ********************               FIRST ORDER CONDITIONAL ESTIMATION WITH INTERACTION              ********************
 #OBJT:**************                       MINIMUM VALUE OF OBJECTIVE FUNCTION                      ********************
 #OBJV:********************************************    10851.893       **************************************************

 ********************               FIRST ORDER CONDITIONAL ESTIMATION WITH INTERACTION              ********************
 ********************                             FINAL PARAMETER ESTIMATE                           ********************

 THETA - VECTOR OF FIXED EFFECTS PARAMETERS   *********
         TH 1      TH 2      TH 3      TH 4      TH 5      TH 6      TH 7      TH 8      TH 9      TH10      TH11
         6.19E+01  2.45E+01  8.30E+00  3.98E-01  2.75E-01  3.84E-01 -1.43E-01  1.23E-01 -4.31E-01  3.16E-02  2.35E-01

 OMEGA - COV MATRIX FOR RANDOM EFFECTS - ETAS  ********
         ETA1      ETA2      ETA3      ETA4      ETA5      ETA6
 ETA1
+        2.59E-01
 ETA2
+        0.00E+00  3.13E-01
 ETA3
+        0.00E+00  0.00E+00  3.93E-01
 ETA4
+        0.00E+00  0.00E+00  0.00E+00  1.73E-01
 ETA5
+        0.00E+00  0.00E+00  0.00E+00  0.00E+00  1.73E-01
 ETA6
+        0.00E+00  0.00E+00  0.00E+00  0.00E+00  0.00E+00  1.73E-01

 SIGMA - COV MATRIX FOR RANDOM EFFECTS - EPSILONS  ****
         EPS1
 EPS1
+        2.26E+04

 OMEGA - CORR MATRIX FOR RANDOM EFFECTS - ETAS  *******
         ETA1      ETA2      ETA3      ETA4      ETA5      ETA6
 ETA1
+        5.09E-01
 ETA2
+        0.00E+00  5.60E-01
 ETA3
+        0.00E+00  0.00E+00  6.27E-01
 ETA4
+        0.00E+00  0.00E+00  0.00E+00  4.16E-01
 ETA5
+        0.00E+00  0.00E+00  0.00E+00  0.00E+00  4.16E-01
 ETA6
+        0.00E+00  0.00E+00  0.00E+00  0.00E+00  0.00E+00  4.16E-01

 SIGMA - CORR MATRIX FOR RANDOM EFFECTS - EPSILONS  ***
         EPS1
 EPS1
+        1.50E+02

 ********************               FIRST ORDER CONDITIONAL ESTIMATION WITH INTERACTION              ********************
 ********************                            STANDARD ERROR OF ESTIMATE                          ********************

 THETA - VECTOR OF FIXED EFFECTS PARAMETERS   *********
         TH 1      TH 2      TH 3      TH 4      TH 5      TH 6      TH 7      TH 8      TH 9      TH10      TH11
         4.65E-02  4.78E-02  2.63E-01  2.46E-03  2.53E-02  1.11E+00  5.46E-01  5.98E-01  6.28E-01  7.99E-03  4.37E-04

 OMEGA - COV MATRIX FOR RANDOM EFFECTS - ETAS  ********
         ETA1      ETA2      ETA3      ETA4      ETA5      ETA6
 ETA1
+        1.74E-01
 ETA2
+       .........  2.52E-02
 ETA3
+       ......... .........  2.66E-01
 ETA4
+       ......... ......... .........  1.45E-01
 ETA5
+       ......... ......... ......... ......... .........
 ETA6
+       ......... ......... ......... ......... ......... .........

 SIGMA - COV MATRIX FOR RANDOM EFFECTS - EPSILONS  ****
         EPS1
 EPS1
+        1.98E+02

 OMEGA - CORR MATRIX FOR RANDOM EFFECTS - ETAS  *******
         ETA1      ETA2      ETA3      ETA4      ETA5      ETA6
 ETA1
+        1.71E-01
 ETA2
+       .........  2.25E-02
 ETA3
+       ......... .........  2.12E-01
 ETA4
+       ......... ......... .........  1.74E-01
 ETA5
+       ......... ......... ......... ......... .........
 ETA6
+       ......... ......... ......... ......... ......... .........

 SIGMA - CORR MATRIX FOR RANDOM EFFECTS - EPSILONS  ***
         EPS1
 EPS1
+        6.60E-01
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
 ********************               FIRST ORDER CONDITIONAL ESTIMATION WITH INTERACTION              ********************
 ********************                      EIGENVALUES OF COR MATRIX OF ESTIMATE                     ********************

             1         2         3         4         5         6         7         8         9        10        11        12
             13        14        15        16
         2.21E-13  4.84E-09  1.43E-02  2.67E-02  5.77E-02  2.00E-01  4.12E-01  4.65E-01  6.85E-01  7.20E-01  7.37E-01  7.56E-01
          8.79E-01  1.77E+00  3.15E+00  6.13E+00
 Elapsed finaloutput time in seconds:     0.09
 #CPUT: Total CPU Time in Seconds,       91.625
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